# Programm: X - Benennung
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# Benutzte Literatur:
# Angabe:
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62, 5 .. □
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F_ymax := 4905 N
l_1 := 25 mm
l_2 := 50 mm
F_y := 3/8*4905 N = 1839.38 N
# Aufgabenstellung:
# - Modellauswahl
# - Datenerhebung
# - Lagerkräfte und erforderlichen Wellendurchmesser bestimmen
# - Lagerauswahl
# - Lebensdauerberechnung
# - Dokumentation
# Berechnung:
# Lagerkräfte max:
solve block
    # guess values
    F_Lymax := 500 N
    F_Wmax := 500 N
    # constraints
    0 == -F_ymax + F_Lymax - F_Wmax
    0 == -F_ymax*(l_1 + l_2) + F_Lymax*l_2
    # solver
    [F_Lymax; F_Wmax] := find(F_Lymax, F_Wmax) = [7.3575; 2.4525] kN
end solve block
# Lagerkräfte :
solve block
    # guess values
    F_Ly := 500 N
    F_W := 500 N
    # constraints
    0 == -F_y + F_Lymax - F_W
    0 == -F_y*(l_1 + l_2) + F_Ly*l_2
    # solver
    [F_Ly; F_W] := find(F_Ly, F_W) = [2.75906; 5.51813] kN
end solve block
# Lagerauswahl :
# Lager 1: 6006 | Lager 2: 6006 | Lager 3:
# Ergebnisse:
